*Heading
** Job name: 3-Point-Bending Model name: Skin_SM355_Damage_Ref
** Generated by: Abaqus/CAE 2023
*Preprint, echo=NO, model=NO, history=NO, contact=NO
**
** PARTS
**
*Part, name=Part
*Node
      1,   14.1436148,   128.683563,           0.
      2,   6.38506651,         150.,           0.
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*Element, type=C3D8R
   1,  2173,    67,     2,     1,  7153,  3475,   682,   564
   2,  2215,  2223,  2166,  2218,  7195,  7203,  7146,  7198
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*Element, type=S4R
18961,   58,   57, 2094, 2095
18962, 2095, 2094, 2093, 2096
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*Nset, nset=CONC, generate
     1,  21777,      1
*Elset, elset=CONC, generate
     1,  18960,      1
*Nset, nset=STEEL
    1,    2,    3,    4,    5,   11
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*Elset, elset=STEEL, generate
 18961,  22800,      1
*Nset, nset=_Skin-1, internal
    1,    2,    3,    4,    5,   11
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*Elset, elset=_Skin-1, internal, generate
 18961,  22800,      1
** Section: Concrete
*Solid Section, elset=CONC, controls=EC-1, material=CDP
,
** Section: Steel
*Shell Section, elset=STEEL, material=Steel, controls=EC-1, offset=SNEG
6., 5
*End Part
**
*Part, name=Support
*End Part
**
**
** ASSEMBLY
**
*Assembly, name=Assembly
**
*Instance, name=Part-1-1, part=Part
*End Instance
**
*Instance, name=Support-1, part=Support
        105.,        -356.,         200.
        105.,        -356.,         200.,         105.,        -356., 201.000000012688, 89.9999992730282
*Node
      1,           0.,         105.,           0.
*Nset, nset=Support-1-RefPt_, internal
1,
*Surface, type=REVOLUTION, name=Support_Contact
START,         200.,         260.
 LINE,         200.,         -50.
*Rigid Body, ref node=Support-1-RefPt_, analytical surface=Support_Contact
*End Instance
**
*Instance, name=Support-2, part=Support
        105.,        -356.,        1600.
        105.,        -356.,        1600.,         105.,        -356., 1601.00000001269, 89.9999992730282
*Node
      1,           0.,         105.,           0.
*Nset, nset=Support-2-RefPt_, internal
1,
*Surface, type=REVOLUTION, name=Support_Contact
START,         200.,         260.
 LINE,         200.,         -50.
*Rigid Body, ref node=Support-2-RefPt_, analytical surface=Support_Contact
*End Instance
**
*Instance, name=Support-3, part=Support
        105.,         356.,         900.
        105.,         356.,         900.,         105.,         356., 901.000000012688, 89.9999992730282
*Node
      1,           0.,         105.,           0.
*Nset, nset=Support-3-RefPt_, internal
1,
*Surface, type=REVOLUTION, name=Support_Contact
START,         200.,         260.
 LINE,         200.,         -50.
*Rigid Body, ref node=Support-3-RefPt_, analytical surface=Support_Contact
*End Instance
**
*Nset, nset=Jig_Move, instance=Support-3
 1,
*Nset, nset=Support_Fix, instance=Support-1
 1,
*Nset, nset=Support_Fix, instance=Support-2
 1,
*Elset, elset=_END_S2, internal, instance=Part-1-1
  9638,  9639,  9640,  9641,  9642,  9643
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*Elset, elset=_END_S1, internal, instance=Part-1-1, generate
  1,  79,   1
*Surface, type=ELEMENT, name=END
_END_S2, S2
_END_S1, S1
*End Assembly
**
** ELEMENT CONTROLS
**
*Section Controls, name=EC-1, ELEMENT DELETION=YES, MAX DEGRADATION=0.95
1., 1., 1.
**
** MATERIALS
**
*Include, input=CDP_Mat.inp
**
*Material, name=Steel
*Damage Initiation, criterion=DUCTILE
 0.0764969,0.,0.
*Damage Evolution, type=ENERGY
 308.05,
*Density
 7.85e-09,
*Elastic
200000., 0.3
*Plastic
    430.,   0.
 552.288, 0.05
 606.563,  0.1
 648.882, 0.15
 684.927,  0.2
 716.925, 0.25
 746.029,  0.3
 772.927, 0.35
 798.071,  0.4
**
** INTERACTION PROPERTIES
**
*Surface Interaction, name=IntProp-1
1.,
*Friction
 0.1,
*Surface Behavior, pressure-overclosure=HARD
**
*Amplitude, name=Down, smooth=0.2
0,	0,	1,	1
**
** BOUNDARY CONDITIONS
**
** Name: Jig_Move Type: Displacement/Rotation
*Boundary
Jig_Move, 1, 1
Jig_Move, 2, 2
Jig_Move, 3, 3
Jig_Move, 4, 4
Jig_Move, 5, 5
Jig_Move, 6, 6
** Name: Support_Fix Type: Symmetry/Antisymmetry/Encastre
*Boundary
Support_Fix, ENCASTRE
**
** INTERACTIONS
**
** Interaction: GenCont
*Contact
*Contact Inclusions, ALL EXTERIOR
*Contact Property Assignment
 ,  , IntProp-1
** ----------------------------------------------------------------
**
** STEP: Three-Point-Bending
**
*Step, name=Three-Point-Bending, nlgeom=YES
*Dynamic, Explicit
, 1.
**
*Bulk Viscosity
0.06, 1.2
** Mass Scaling: Semi-Automatic
**               Whole Model
*Variable Mass Scaling, dt=1E-5, type=below min, frequency=1
** BOUNDARY CONDITIONS
**
** Name: Jig_Move Type: Displacement/Rotation
*Boundary, amplitude=Down
Jig_Move, 2, 2, -30.
**
** OUTPUT REQUESTS
**
*Restart, write, overlay
**
** FIELD OUTPUT: F-Output-1
**
*Output, field, number interval=20, time marks=NO
*Node Output
A, CF, RF, U, V
*Element Output, directions=YES
LE, PE, PEEQ, PEMAG, S, STATUS
*Contact Output
CDISP, CSTRESS
**
** HISTORY OUTPUT: H-Output-2
**
*Output, history, frequency=1
*Node Output, nset=Jig_Move
RF2, U2
**
** HISTORY OUTPUT: H-Output-1
**
*Output, history, variable=PRESELECT
*End Step
